Rp := 100000 Ω
RA := 100 Ω
C := 4.7 μF
Rf := 1500 Ω
Rb := 1000 kΩ
Rb2 := Rp + Rf
RB := Rb*Rb2/(Rb + Rb2) = 92147.1 Ω
T := 0.693*(RA + 2*RB)*C = 0.60059 s
f := 1/T = 1.66503 Hz
D := RB/(RA + 2*RB) = 0.499729
Rp := 0 Ω
RA := 100 Ω
C := 4.7 μF
Rf := 1500 Ω
Rb := 1000 kΩ
Rb2 := Rp + Rf
RB := Rb*Rb2/(Rb + Rb2) = 1497.75 Ω
T := 0.693*(RA + 2*RB)*C = 0.0100824 s
f := 1/T = 99.183 Hz
D := RB/(RA + 2*RB) = 0.483848
